/PREP7

*DO,I,1,2001
NSEL,ALL
NSEL,R,LOC,X,REACT(I,2)
NSEL,R,LOC,Y,REACT(I,3)
NSEL,R,LOC,Z,REACT(I,4)
*GET,NODENUM,NODE,0,NUM,MIN
F,NODENUM,FX,REACT(I,5)
F,NODENUM,FY,REACT(I,6)
F,NODENUM,FZ,REACT(I,7)
*ENDDO


CMSEL,S,Selection_4

DDELE,ALL,UX
DDELE,ALL,UY
DDELE,ALL,UZ

! must constriant atlest one node

D,424200,UX,0
D,424200,UY,0
D,424200,UZ,0
